*Heading
** Job name: GMNA Model name: GMNA
** Generated by: Abaqus/CAE 2019
*Preprint, echo=NO, model=NO, history=NO, contact=NO
**
** PARTS
**
*Part, name=Part-1
*Node
      1,   960.117615,   279.596466,           0.
      2,           0.,   279.596466,   960.117615
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*Element, type=S4R
   1,    1,   13, 1403,  256
   2,   13,   14, 1404, 1403
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*Nset, nset=Set-1, generate
     1,  17802,      1
*Elset, elset=Set-1, generate
     1,  17388,      1
** Section: Section-1
*Shell Section, elset=Set-1, material=Steel
1.32, 5
*End Part
**
**
** ASSEMBLY
**
*Assembly, name=Assembly
**
*Instance, name=Part-1-1, part=Part-1
*End Instance
**
*Node
      1,           0.,           0.,           0.
*Node
      2,           0.,   559.190002,           0.
*Nset, nset=Set-5
 1,
*Nset, nset=Set-6
 2,
*Nset, nset=Set-7
 2,
*Nset, nset=Set-8, instance=Part-1-1
 1,
*Nset, nset=Set-9, instance=Part-1-1
 1,
*Nset, nset=t_Set-1, instance=Part-1-1
    6,    7,    9,   11,  380,  381
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*Elset, elset=t_Set-1, instance=Part-1-1
  4244,  4245,  4246,  4247,  4248,  4249
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*Nset, nset=t_Set-3, instance=Part-1-1
    3,    4,   10,   12,  135,  136
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*Elset, elset=t_Set-3, instance=Part-1-1
  1977,  1978,  1979,  1980,  1981,  1982
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*Nset, nset=_PickedSet7, internal
 2,
*Nset, nset=_PickedSet9, internal
 1,
** Constraint: Constraint-1
*Rigid Body, ref node=_PickedSet7, tie nset=t_Set-1
** Constraint: Constraint-2
*Rigid Body, ref node=_PickedSet9, tie nset=t_Set-3
*End Assembly
*Amplitude, name=Amp-1
             0.,              1.,              1.,              1.
*Amplitude, name=Amp-2
             0.,              0.,            0.01,            0.01,            0.02,            0.02,            0.03,            0.03
           0.04,            0.04,            0.05,            0.05,            0.06,            0.06,            0.07,            0.07
           0.08,            0.08,            0.09,            0.09,             0.1,             0.1,            0.11,            0.11
           0.12,            0.12,            0.13,            0.13,            0.14,            0.14,            0.15,            0.15
           0.16,            0.16,            0.17,            0.17,            0.18,            0.18,            0.19,            0.19
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             1.,              1.
**
** MATERIALS
**
*Material, name=Steel
*Density
 7.8e-09,
*Elastic
210000., 0.3
*Plastic
210.,0.
** ----------------------------------------------------------------
**
** STEP: Step-1
**
*Step, name=Step-1, nlgeom=YES, inc=300
*Dynamic
0.01,1.,1e-15,0.01
**
** BOUNDARY CONDITIONS
**
** Name: BC-1 Type: Displacement/Rotation
*Boundary
Set-5, 1, 1
Set-5, 2, 2
Set-5, 3, 3
Set-5, 4, 4
Set-5, 5, 5
Set-5, 6, 6
** Name: BC-2 Type: Displacement/Rotation
*Boundary
Set-6, 1, 1
Set-6, 3, 3
Set-6, 4, 4
Set-6, 5, 5
Set-6, 6, 6
** Name: BC-3 Type: Displacement/Rotation
*Boundary
Set-8, 1, 1
**
** LOADS
**
** Name: Load-1   Type: Concentrated force
*Cload, amplitude=Amp-2
Set-7, 2, 2e+06
**
** OUTPUT REQUESTS
**
*Restart, write, frequency=0
**
** FIELD OUTPUT: F-Output-1
**
*Output, field, variable=PRESELECT, frequency=1
**
** HISTORY OUTPUT: H-Output-1
**
*Output, history, variable=PRESELECT, frequency=1
*End Step
