*Heading
** Job name: GNA-2 Model name: GNA
** Generated by: Abaqus/CAE 2019
*Preprint, echo=NO, model=NO, history=NO, contact=NO
**
** PARTS
**
*Part, name=Part-1
*Node
      1,   960.117615,   279.596466,           0.
      2,           0.,   279.596466,  -960.117615
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*Element, type=S4R
   1,    1,   13, 1317,  242
   2,   13,   14, 1318, 1317
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*Nset, nset=Set-1, generate
     1,  15908,      1
*Elset, elset=Set-1, generate
     1,  15520,      1
** Section: Section-1
*Shell Section, elset=Set-1, material=Material-1
1.32, 5
*End Part
**
**
** ASSEMBLY
**
*Assembly, name=Assembly
**
*Instance, name=Part-1-1, part=Part-1
*End Instance
**
*Node
      1,           0.,           0.,           0.
*Node
      2,           0.,   559.192932,           0.
*Nset, nset=Set-5
 1,
*Nset, nset=Set-6
 2,
*Nset, nset=Set-7
 2,
*Nset, nset=Set-8, instance=Part-1-1
 1,
*Nset, nset=t_Set-1, instance=Part-1-1
    3,    4,    9,   11,  128,  129
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*Elset, elset=t_Set-1, instance=Part-1-1
  1921,  1922,  1923,  1924,  1925,  1926
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*Nset, nset=t_Set-3, instance=Part-1-1
    6,    7,   10,   12,  358,  359
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*Elset, elset=t_Set-3, instance=Part-1-1
  3781,  3782,  3783,  3784,  3785,  3786
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*Nset, nset=_PickedSet7, internal
 2,
*Nset, nset=_PickedSet9, internal
 1,
** Constraint: Constraint-1
*Rigid Body, ref node=_PickedSet7, tie nset=t_Set-1
** Constraint: Constraint-2
*Rigid Body, ref node=_PickedSet9, tie nset=t_Set-3
*End Assembly
**
** MATERIALS
**
*Material, name=Material-1
*Elastic
210000., 0.3
**
** BOUNDARY CONDITIONS
**
** Name: BC-1 Type: Displacement/Rotation
*Boundary
Set-5, 1, 1
Set-5, 2, 2
Set-5, 3, 3
Set-5, 4, 4
Set-5, 5, 5
Set-5, 6, 6
** Name: BC-2 Type: Displacement/Rotation
*Boundary
Set-6, 1, 1
Set-6, 3, 3
Set-6, 4, 4
Set-6, 5, 5
Set-6, 6, 6
** ----------------------------------------------------------------
**
** STEP: Step-1
**
*Step, name=Step-1, nlgeom=YES, inc=300
*Static, stabilize, factor=1e-09, allsdtol=0, continue=NO
0.01, 1., 1e-15, 0.01
**
** BOUNDARY CONDITIONS
**
** Name: BC-1 Type: Displacement/Rotation
*Boundary, op=NEW
Set-5, 1, 1
Set-5, 2, 2
Set-5, 3, 3
Set-5, 4, 4
Set-5, 5, 5
Set-5, 6, 6
** Name: BC-2 Type: Displacement/Rotation
*Boundary, op=NEW
Set-6, 1, 1
Set-6, 3, 3
Set-6, 4, 4
Set-6, 5, 5
Set-6, 6, 6
** Name: BC-3 Type: Displacement/Rotation
*Boundary, op=NEW
Set-8, 1, 1
**
** LOADS
**
** Name: Load-1   Type: Concentrated force
*Cload
Set-7, 2, 2e+06
**
** OUTPUT REQUESTS
**
*Restart, write, frequency=0
**
** FIELD OUTPUT: F-Output-1
**
*Output, field, variable=PRESELECT
**
** HISTORY OUTPUT: H-Output-1
**
*Output, history, variable=PRESELECT
*End Step
